# STAGE13 — PMMCS rc8p0 — MSD Na & K vs Temperature for Arrhenius (IEX Proto1)
# System: 75SiO2·(25-x)Na2O·xK2O·10CaO  (5000 oxide units, metal units)
#
# Command-line variables:
#   val_x       x_target (1,3,6,9,12,15)
#   val_r       replica (1,2,3)
#   potfile     path to PMMCS_pedone_rc8p0.mod
#   datafile    path to IOX1_723K_xt${x}_r${r}_PMMCS_rc8p0.data
#
# Protocol per temperature (T = 723, 800, 1000, 1200, 1400 K):
#   1) Heat NPT prevT → T at 1 K/ps  (0 steps for T=723, input already at 723 K)
#   2) Equilibrate NPT at T: 1 ns (no MSD)
#   3) Production NPT at T: 4 ns (MSD Na + K, every 2 ps)
#
# dt = 0.002 ps (2 fs)  |  NPT iso P = 1 bar
# Na MSD guarded: IEX1 at x_target=15 has 0 Na atoms.

################################################################################
###--- INITIALIZATION ---###

echo            both
units           metal
dimension       3
boundary        p p p
atom_style      charge
atom_modify     map yes
newton          on

################################################################################
###--- INPUT STRUCTURE (IEX1 glass at 723 K) ---###

variable        x   equal ${val_x}
variable        r   equal ${val_r}

read_data       ${datafile}
log             logs/stage13_x${x}_r${r}_PMMCS_rc8p0.lammps

################################################################################
###--- INTERATOMIC POTENTIAL ---###

include         ${potfile}
neighbor        2.0 bin
neigh_modify    delay 0 every 1 check yes

################################################################################
###--- GROUPS ---###
# Atom types: Si=1  O=2  Ca=3  Na=4  K=5
# Note: Na group is empty for x_target=15 (fully exchanged glass).

group Na type 4
group K  type 5

variable n_Na equal count(Na)

################################################################################
###--- TIME STEP & THERMO ---###

timestep        0.002

thermo          5000
thermo_style    custom step time temp press pe ke etotal vol density
thermo_modify   norm no

################################################################################
###--- NPT SETTINGS ---###

variable Pbar  equal 1.0
variable Tdamp equal 0.2
variable Pdamp equal 2.0

variable dt_ps    equal 0.002
variable eq_ps    equal 1000.0                       # 1 ns equilibration
variable prod_ps  equal 4000.0                       # 4 ns production
variable eq_steps equal floor(v_eq_ps/v_dt_ps)      # 500 000
variable pr_steps equal floor(v_prod_ps/v_dt_ps)    # 2 000 000

################################################################################
###--- TEMPERATURE LOOP ---###
# prevT = 723 K: input is already at 723 K, so ramp for T=723 has 0 steps.

variable thisT index 723 800 1000 1200 1400
variable prevT equal 723.0

label loop_T

    print "=================================================="
    print " STAGE13 IEX1: x=${x} r=${r}  T=${thisT} K"
    print " Heat from ${prevT} K to ${thisT} K at 1 K/ps"
    print " Equil: ${eq_steps} steps (1 ns)"
    print " Prod : ${pr_steps} steps (4 ns)"
    print "=================================================="

    reset_timestep 0

    # ── Heating ramp: prevT → thisT at 1 K/ps ──────────────────────────────
    # ramp_steps = 0 on the first iteration (723→723); run 0 is valid in LAMMPS.
    variable ramp_steps equal ceil((${thisT}-${prevT})/(1.0*v_dt_ps))
    fix rampNPT all npt temp ${prevT} ${thisT} ${Tdamp} iso ${Pbar} ${Pbar} ${Pdamp}
    run ${ramp_steps}
    unfix rampNPT
    reset_timestep 0

    # ── Equilibration (no MSD) ──────────────────────────────────────────────
    fix eqNPT all npt temp ${thisT} ${thisT} ${Tdamp} iso ${Pbar} ${Pbar} ${Pdamp}
    run ${eq_steps}
    unfix eqNPT
    reset_timestep 0

    # ── Production + MSD ───────────────────────────────────────────────────
    # Na MSD only if Na atoms exist (empty for x_target=15)
    if "${n_Na} > 0" then &
        "compute msdNa Na msd com yes" &
        "fix msdNaOut all ave/time 1000 1 1000 c_msdNa[1] c_msdNa[2] c_msdNa[3] c_msdNa[4] file data/msd_Na_${thisT}K_x${x}_r${r}.dat"

    compute msdK  K  msd com yes
    fix msdKOut all ave/time 1000 1 1000 &
        c_msdK[1] c_msdK[2] c_msdK[3] c_msdK[4] &
        file data/msd_K_${thisT}K_x${x}_r${r}.dat

    fix prodNPT all npt temp ${thisT} ${thisT} ${Tdamp} iso ${Pbar} ${Pbar} ${Pdamp}
    run ${pr_steps}

    unfix prodNPT
    unfix msdKOut
    uncompute msdK

    if "${n_Na} > 0" then &
        "unfix msdNaOut" &
        "uncompute msdNa"

    variable prevT equal ${thisT}

    write_restart data/restart_${thisT}K_x${x}_r${r}

next thisT
jump SELF loop_T

print "STAGE13 IEX1 complete: x=${x} r=${r}"
