# STAGE7 — PMMCS rc8p0 — Quench 723K → 300K at 1K/ps  (no minimization)
# Input variables (command line):
#   val_datafile   full path to input .data file at 723K
#   val_tag        unique run ID (e.g. AM_x6_r2, IEX1_xt3_r1, IEX2_xp0_r3)
#   val_outfile    full path to output .data file at 300K
#   potfile        path to potential mod file

units           metal
boundary        p p p
atom_style      charge
atom_modify     map yes
newton          on

read_data       ${val_datafile}

log             logs/stage7_${val_tag}.lammps

include         ${potfile}
neighbor        1.0 bin
neigh_modify    once no every 1 delay 0 check yes

thermo          10000
thermo_style    custom step time temp press pe etotal vol density
thermo_modify   norm no

timestep        0.001

# Frames para g(r): 10 frames cada 42300 pasos durante el enfriamiento (NVT, vol fijo)
dump TRAJ all custom 42300 trajectories/Quench_${val_tag}_PMMCS_rc8p0.lammpstrj id type x y z
dump_modify TRAJ sort id

# Quench 723→300K at 1K/ps: (723-300)/1 = 423 ps = 423000 steps — NVT (volumen fijo, conserva tensiones IEX)
fix QUENCH all nvt temp 723.0 300.0 0.1
run             423000
unfix QUENCH
undump TRAJ

write_data      ${val_outfile} nocoeff nofix
print "DONE ${val_tag}: T=$(temp) K  press=$(press) bar  vol=$(vol) Ang3"
