# STAGE10 — PMMCS rc8p0 — MSD Na & K vs Temperature for Arrhenius
# System: 75SiO2·(15-x)Na2O·xK2O·10CaO  (5000 oxide units, metal units)
#
# Command-line variables:
#   val_x       composition index (1,3,6,9,12)
#   val_r       replica (1,2,3)
#   potfile     path to PMMCS_pedone_rc8p0.mod
#   datafile    path to AsMelted_300K_x${x}_r${r}_PMMCS_rc8p0.data
#
# Protocol per temperature (T = 600, 723, 800, 1000, 1200 K):
#   1) Heat NPT 300 K → T at 1 K/ps
#   2) Equilibrate NPT at T: 1 ns (no MSD)
#   3) Production NPT at T: 4 ns (MSD Na + K, every 2 ps)
#
# dt = 0.002 ps (2 fs)  |  NPT iso P = 1 bar

################################################################################
###--- INITIALIZATION ---###

echo            both
units           metal
dimension       3
boundary        p p p
atom_style      charge
atom_modify     map yes
newton          on

################################################################################
###--- INPUT STRUCTURE (300 K glass) ---###

variable        x   equal ${val_x}
variable        r   equal ${val_r}

read_data       ${datafile}
log             logs/stage10_x${x}_r${r}_PMMCS_rc8p0.lammps

################################################################################
###--- INTERATOMIC POTENTIAL ---###

include         ${potfile}
neighbor        2.0 bin
neigh_modify    delay 0 every 1 check yes

################################################################################
###--- GROUPS ---###
# Atom types: Si=1  O=2  Ca=3  Na=4  K=5

group Na type 4
group K  type 5

################################################################################
###--- TIME STEP & THERMO ---###

timestep        0.002

thermo          5000
thermo_style    custom step time temp press pe ke etotal vol density
thermo_modify   norm no

################################################################################
###--- NPT SETTINGS ---###

variable Pbar  equal 1.0
variable Tdamp equal 0.2
variable Pdamp equal 2.0

# Run-length variables (in ps and steps)
variable dt_ps    equal 0.002
variable eq_ps    equal 1000.0                       # 1 ns equilibration
variable prod_ps  equal 4000.0                       # 4 ns production
variable eq_steps equal floor(v_eq_ps/v_dt_ps)      # 500 000
variable pr_steps equal floor(v_prod_ps/v_dt_ps)    # 2 000 000

################################################################################
###--- TEMPERATURE LOOP ---###

variable thisT index 600 723 800 1000 1200
variable prevT equal 300.0

label loop_T

    print "=================================================="
    print " STAGE10: x=${x} r=${r}  T=${thisT} K"
    print " Heat from ${prevT} K to ${thisT} K at 1 K/ps"
    print " Equil: ${eq_steps} steps (1 ns)"
    print " Prod : ${pr_steps} steps (4 ns)"
    print "=================================================="

    reset_timestep 0

    # ── Heating ramp: prevT → thisT at 1 K/ps ──────────────────────────────
    variable ramp_steps equal ceil((${thisT}-${prevT})/(1.0*v_dt_ps))
    fix rampNPT all npt temp ${prevT} ${thisT} ${Tdamp} iso ${Pbar} ${Pbar} ${Pdamp}
    run ${ramp_steps}
    unfix rampNPT
    reset_timestep 0

    # ── Equilibration (no MSD) ──────────────────────────────────────────────
    fix eqNPT all npt temp ${thisT} ${thisT} ${Tdamp} iso ${Pbar} ${Pbar} ${Pdamp}
    run ${eq_steps}
    unfix eqNPT
    reset_timestep 0

    # ── Production + MSD ───────────────────────────────────────────────────
    compute msdNa Na msd com yes
    compute msdK  K  msd com yes

    # MSD saved every 1000 steps = 2 ps
    # Columns: step  msd_x  msd_y  msd_z  msd_tot
    fix msdNaOut all ave/time 1000 1 1000 &
        c_msdNa[1] c_msdNa[2] c_msdNa[3] c_msdNa[4] &
        file data/msd_Na_${thisT}K_x${x}_r${r}.dat

    fix msdKOut all ave/time 1000 1 1000 &
        c_msdK[1] c_msdK[2] c_msdK[3] c_msdK[4] &
        file data/msd_K_${thisT}K_x${x}_r${r}.dat

    fix prodNPT all npt temp ${thisT} ${thisT} ${Tdamp} iso ${Pbar} ${Pbar} ${Pdamp}
    run ${pr_steps}

    unfix prodNPT
    unfix msdNaOut
    unfix msdKOut
    uncompute msdNa
    uncompute msdK

    # Update prevT for next heating ramp
    variable prevT equal ${thisT}

    write_restart data/restart_${thisT}K_x${x}_r${r}

next thisT
jump SELF loop_T

print "STAGE10 complete: x=${x} r=${r}"
